# ========== Slab Flow / Compression Simulation with Piston Forcing ==========
# Starting from equilibrated configuration (solvent near walls already removed)
# Variables from bash script: dataname, interaction, epsSS, epsSP, nsteps
#
# Atom types: 1=polymer, 2=crosslinker, 3=solvent, 4=support, 5=piston, 6=walls
#
# Reduced LJ units: tau = sigma*sqrt(m/epsilon)
# dt = 0.005 → 1e6 steps ≈ 4.1e3 tau
#
# Modes (set compression_mode below):
#   compression_mode = 0 : PERMEATION  — piston interacts with solvent (WCA);
#                          solvent flows through support under piston pressure.
#   compression_mode = 1 : COMPRESSION — piston passes through solvent (no 3-5
#                          interaction); piston contacts gel directly, squeezes
#                          solvent out the support bottom.  Piston is frozen once
#                          comp_percent strain is reached; stresses then relax at
#                          fixed deformation for the remainder of nsteps.
#
# Phases:
#   1. Mode-dependent equilibration (full 3D NVT, full LJ from the start).
#        PERMEATION:  perm_setup_freq steps, piston z-free (settles onto solvent).
#        COMPRESSION: comp_setup_freq steps, piston fully frozen, solvent-piston OFF.
#      Brief minimize at the start to resolve any residual overlaps.
#   2. Production — nsteps total (compression + relaxation combined).
#      Compression mode: halts at comp_percent strain, then relaxes for the
#                        remaining (nsteps - steps_used_compressing) steps.
#      Permeation  mode: runs nsteps with ramped force, no halt.


# ==========================================================================
#                              PARAMETERS
# ==========================================================================

# ----- Mode Selection -----
# 0 = permeation (solvent-piston WCA, piston pushes fluid through gel)
# 1 = compression (solvent-piston OFF, piston loads gel directly)
variable compression_mode equal 1

# ----- Physical Parameters -----
variable sigma         equal 1.0
variable temp_target   equal 1.0
variable P_target      equal 1.5
variable timestep_prod equal 0.005

# ----- Piston Force Ramp -----
# Force ramps linearly from start to end over each production run segment.
# Negative = pushing in -z direction.
variable piston_force_start equal -0.02
variable piston_force_end   equal -0.08

# ----- Phase 1: Mode-Dependent Setup -----
variable perm_setup_freq equal 20000    # permeation equilibration steps
variable comp_setup_freq equal 50000    # compression equilibration steps
variable comp_percent    equal 0.1      # strain threshold for compression halt

# ----- Output Frequencies -----
variable thermo_freq     equal 10000 # 2000  # 250000
variable dump_freq_setup equal 10000      # frequent dumps during Phase 1
variable dump_freq_prod  equal 10000 # 5000 # 100000     # sparse dumps during Phase 2
variable volume_freq     equal 5000 # 1000 # 5000

# ======================================================================

# ----- Time Averaging (stress) -----
# nfreq = nevery * nrepeat  (LAMMPS constraint)
variable num_stress_curves equal 10    # target output frames
variable nevery_target     equal 100   # ~0.5 tau — near stress decorrelation time
variable nrepeat_max       equal 2000  # cap to preserve transient resolution
variable nrepeat_min       equal 50    # floor for adequate noise reduction

variable nfreq_raw    equal floor(${nsteps}/v_num_stress_curves)
variable nrepeat_raw  equal floor(v_nfreq_raw/v_nevery_target)

# Clamp nrepeat to [min, max]
variable nr_lo equal (v_nrepeat_raw>v_nrepeat_min)*v_nrepeat_raw+(v_nrepeat_raw<=v_nrepeat_min)*v_nrepeat_min
variable nrepeat_stress equal (v_nr_lo<v_nrepeat_max)*v_nr_lo+(v_nr_lo>=v_nrepeat_max)*v_nrepeat_max

# Derive nevery and enforce exact constraint
variable nevery_stress equal floor(v_nfreq_raw/v_nrepeat_stress)
variable nfreq_stress  equal v_nevery_stress*v_nrepeat_stress

print ">>> Stress: nevery=${nevery_stress} nrepeat=${nrepeat_stress} nfreq=${nfreq_stress}"
print ">>> Mode: compression_mode=${compression_mode}  (0=permeation, 1=compression)"

# ----- Spatial Binning -----
variable binWidth    equal 2.0
variable rg_scale    equal 1.8   # Rg multiplier (~90% coverage for Gaussian)
variable region_frac equal 1     # fraction of polymer extent for analysis regions


# ==========================================================================
#                           INITIALIZATION
# ==========================================================================

units lj
dimension 3
boundary p p p
atom_style molecular
atom_modify map array

pair_style lj/cut 1.122
bond_style fene

read_data data_files/${dataname}.data nocoeff

comm_modify cutoff 5.0

print "========================================"
print "Flow/Compression simulation: ${dataname}"
print "Interaction: epsSS=${epsSS}, epsSP=${epsSP}"
print "Production steps: ${nsteps}"
print "Piston force: ${piston_force_start} -> ${piston_force_end} (ramp)"
print "========================================"


# ==========================================================================
#                          GROUP DEFINITIONS
# ==========================================================================

group polymer   type 1 2
group solvent   type 3
group support   type 4
group piston    type 5
group walls     type 6
group mobile    type 1 2 3
group gel_system type 1 2 3 4 5


# ==========================================================================
#                       INTERATOMIC POTENTIALS
# ==========================================================================

# Default: full LJ for all pairs
pair_coeff * * 1.0 ${sigma} 1.122

# Polymer-solvent & solvent-solvent (tunable)
pair_coeff 1 3 ${epsSP} ${sigma} 1.122    # polymer-solvent
pair_coeff 2 3 ${epsSP} ${sigma} 1.122    # crosslinker-solvent
pair_coeff 3 3 ${epsSS} ${sigma} 1.122    # solvent-solvent

# Polymer/crosslinker with support and piston (WCA repulsive)
pair_coeff 1 4 1.0 ${sigma} 1.122
pair_coeff 2 4 1.0 ${sigma} 1.122
pair_coeff 1 5 1.0 ${sigma} 1.122
pair_coeff 2 5 1.0 ${sigma} 1.122

# Solvent-piston: mode-dependent from the start
#   permeation  (0) → WCA: piston pushes fluid as a plug
#   compression (1) → OFF: piston passes through solvent freely
pair_coeff 3 5 0.0 ${sigma} 0.0                 # default: OFF (compression)
if "${compression_mode} == 0" then &
    "pair_coeff 3 5 1.0 ${sigma} 1.122"          # permeation: WCA

# Wall interactions (WCA)
pair_coeff 1 6 1.0 ${sigma} 1.122
pair_coeff 2 6 1.0 ${sigma} 1.122
pair_coeff 3 6 1.0 ${sigma} 1.122

# Non-interacting pairs
pair_coeff 3 4 0.0 ${sigma} 0.0         # solvent-support
pair_coeff 4 4 0.0 ${sigma} 0.0         # support-support
pair_coeff 4 5 0.0 ${sigma} 0.0         # support-piston
pair_coeff 4 6 0.0 ${sigma} 0.0         # support-wall
pair_coeff 5 5 0.0 ${sigma} 0.0         # piston-piston
pair_coeff 5 6 0.0 ${sigma} 0.0         # piston-wall
pair_coeff 6 6 0.0 ${sigma} 0.0         # wall-wall

# ----- Bonds and Angles -----
bond_coeff * 30.0 1.5 1.0 1.0
special_bonds fene

# Angle style — hybrid (uncomment if angles are present in data file)
#angle_style hybrid cosine harmonic
#angle_coeff 1 cosine 1.0
#angle_coeff 2 harmonic 40.0 109.47

# ----- Neighbor List Exclusions -----
neigh_modify exclude type 4 4   # support-support
neigh_modify exclude type 5 5   # piston-piston
neigh_modify exclude type 6 6   # wall-wall
neigh_modify exclude type 4 5   # support-piston
neigh_modify exclude type 4 6   # support-wall
neigh_modify exclude type 5 6   # piston-wall


# ==========================================================================
#                           RIGID BODIES
# ==========================================================================

# Support: completely frozen
velocity support set 0.0 0.0 0.0
fix rigid_support support rigid single force * off off off torque * off off off

# Walls: completely frozen
velocity walls set 0.0 0.0 0.0
fix rigid_walls walls rigid single force * off off off torque * off off off

# Piston: mode-dependent from the start
#   Compression: fully frozen during Phase 1 (z-motion enabled in Phase 2)
#   Permeation:  z-motion enabled immediately (settles onto solvent surface)
velocity piston set 0.0 0.0 0.0

if "${compression_mode} == 1" then &
    "fix rigid_piston piston rigid single force * off off off torque * off off off" &
    "fix freeze_piston piston setforce 0.0 0.0 0.0"

if "${compression_mode} == 0" then &
    "fix rigid_piston piston rigid single force * off off on torque * off off off"


# ==========================================================================
#                           THERMO OUTPUT
# ==========================================================================

compute mobile_temp mobile temp
compute mobile_press all pressure thermo_temp pair bond
thermo_style custom step c_mobile_temp pe ke etotal press c_mobile_press vol lx ly lz
thermo_modify lost warn
thermo ${thermo_freq}


# ==========================================================================
#              PHASE 0: MODE-DEPENDENT EQUILIBRATION
# ==========================================================================
# Full LJ from the start (no soft push needed — data file is pre-cleaned).
# Brief minimize to resolve any residual overlaps, then full 3D NVT.
#   PERMEATION:  perm_setup_freq steps, piston z-free (settles onto solvent).
#   COMPRESSION: comp_setup_freq steps, piston frozen, solvent-piston OFF.

print "========================================"
if "${compression_mode} == 0" then &
    "print 'Phase 0: Permeation equilibration (${perm_setup_freq} steps)'"
if "${compression_mode} == 1" then &
    "print 'Phase 0: Compression equilibration (${comp_setup_freq} steps)'"
print "========================================"

reset_timestep 0
timestep ${timestep_prod}

# Brief minimize to clean up any residual overlaps
minimize 1.0e-4 1.0e-6 1000 10000

# Setup trajectory (both modes) (don't forget to uncomment "undump")
dump traj_setup gel_system custom ${dump_freq_setup} &
   traj_files/gel_setup_${dataname}_${interaction}_${nsteps}.lammpstrj &
   id type mol x y z


# Walls and support remain rigid throughout — no NPT, no temporary nve.
# (NPT was removed because fix rigid force*off prevents the frozen piston from
#  scaling with the box: gel atoms scale upward past the piston → FENE errors
#  and T spike.  See notes in CLAUDE_CONTEXT.md 2026-04-29.)

# Full 3D NVT equilibration at fixed box volume
fix nvt_equil mobile nvt temp ${temp_target} ${temp_target} 1.0

if "${compression_mode} == 0" then "run ${perm_setup_freq}"
if "${compression_mode} == 1" then "run ${comp_setup_freq}"

print ">>> Post-equilibration T = $(c_mobile_temp)"
unfix nvt_equil


# ==========================================================================
#    PHASE 0.5: PISTON PRE-COMPRESSION TO TARGET PRESSURE (compression mode)
# ==========================================================================
# After wall insertion some solvent is removed near the walls, dropping
# mobile_press from 1.5 to ~0.44.  NPT cannot fix this: the piston is frozen
# with fix rigid (force off), so NPT box scaling moves gel atoms past the
# static piston → FENE bond stretching and T spikes.
#
# Correct fix: use the piston itself — the only legitimate z degree of freedom
# (x,y are locked by lateral walls).  Ramp the piston force slowly to the
# level that produces P_target, let the piston settle, then freeze it.
# Phase 2 then adds its own ramp ON TOP of this base force.
#
# piston_force_base = -P_target * Lx * Ly / N_piston (computed at runtime)
#                   ≈ -1.5 * 65.15^2 / 54162  ≈  -0.1176 ε/σ per atom

print "========================================"
print "Phase 0.5: Piston pre-compression to P_target"
print "========================================"

variable precomp_ramp_steps  equal 100000
variable precomp_hold_steps  equal 100000
variable precomp_equil_steps equal 50000
variable precomp_f_start     equal -0.01
variable precomp_f_base      equal -${P_target}*lx*ly/count(piston)

print ">>> precomp_f_base = $(v_precomp_f_base)"

# Enable piston z-motion (permeation piston is already free from Phase 0)
if "${compression_mode} == 1" then "unfix freeze_piston"
if "${compression_mode} == 1" then "unfix rigid_piston"
if "${compression_mode} == 1" then &
    "fix rigid_piston piston rigid single force * off off on torque * off off off"

fix nvt_precomp mobile nvt temp ${temp_target} ${temp_target} 1.0

# Phase 0.5a: Ramp force from gentle start to base level (avoids FENE stretching)
if "${compression_mode} == 1" then &
    "fix drag_precomp piston viscous 0.05"
if "${compression_mode} == 1" then &
    "variable precomp_framp equal ramp(${precomp_f_start},${precomp_f_base})"
if "${compression_mode} == 1" then &
    "fix push_precomp piston addforce 0.0 0.0 v_precomp_framp"
if "${compression_mode} == 1" then "run ${precomp_ramp_steps}"
if "${compression_mode} == 1" then "unfix push_precomp"

# Phase 0.5b: Hold at base force — piston reaches mechanical equilibrium
if "${compression_mode} == 1" then &
    "fix push_precomp_hold piston addforce 0.0 0.0 ${precomp_f_base}"
if "${compression_mode} == 1" then "run ${precomp_hold_steps}"
if "${compression_mode} == 1" then "unfix push_precomp_hold"
if "${compression_mode} == 1" then "unfix drag_precomp"

# Permeation mode: extra NVT so piston can settle on the solvent surface
if "${compression_mode} == 0" then "run 100000"

print ">>> Post-pre-compression: T = $(c_mobile_temp)  mobile_press = $(c_mobile_press)"

# Freeze piston at equilibrium position (compression mode)
if "${compression_mode} == 1" then "velocity piston set 0.0 0.0 0.0"
if "${compression_mode} == 1" then "unfix rigid_piston"
if "${compression_mode} == 1" then &
    "fix rigid_piston piston rigid single force * off off off torque * off off off"
if "${compression_mode} == 1" then "fix freeze_piston piston setforce 0.0 0.0 0.0"

# NVT equilibration at frozen piston density
run ${precomp_equil_steps}
unfix nvt_precomp

print ">>> Post-pressure-equilibration T = $(c_mobile_temp)  Press = $(press)  mobile_press = $(c_mobile_press)"

undump traj_setup


# ==========================================================================
#                    ANALYSIS: POLYMER TRACKING
# ==========================================================================

compute polymer_com polymer com

# ----- Bounding Box (BB) — gel dimensions from min/max coordinates -----
# Sensitive to outlier beads; kept for diagnostics and gel dimension output.
compute minx polymer reduce min x
compute maxx polymer reduce max x
compute miny polymer reduce min y
compute maxy polymer reduce max y
compute minz polymer reduce min z
compute maxz polymer reduce max z

variable gel_lx_bb equal c_maxx-c_minx
variable gel_ly_bb equal c_maxy-c_miny
variable gel_lz_bb equal c_maxz-c_minz
variable gel_vol_bb equal v_gel_lx_bb*v_gel_ly_bb*v_gel_lz_bb

# ----- Radius of Gyration (Rg) — robust gel dimensions -----
# For a uniform rectangular prism: Rg_ii² = L_i²/12  →  L_i = 2√3·√(Rg_ii²)
# c_rg_tensor[i] returns Rg_ii² (diagonal component of gyration tensor).
compute rg_tensor polymer gyration

variable gel_lx_rg equal 2.0*sqrt(3.0*c_rg_tensor[1])
variable gel_ly_rg equal 2.0*sqrt(3.0*c_rg_tensor[2])
variable gel_lz_rg equal 2.0*sqrt(3.0*c_rg_tensor[3])
variable gel_vol_rg equal v_gel_lx_rg*v_gel_ly_rg*v_gel_lz_rg

# ----- Box dimensions -----
variable box_lx equal lx
variable box_ly equal ly
variable box_lz equal lz

# ----- Piston position/velocity computes -----
# Defined here (before run 0) so they are initialized alongside polymer/rg computes.
# Used unconditionally in piston output fixes, and in permeation-mode reservoir
# regions where LAMMPS evaluates variable bounds at region creation time.
compute piston_com piston com          # PBC-aware COM; use [3] for z
compute piston_vz piston reduce ave vz  # velocities do not wrap

run 0   # initializes ALL computes in one pass

# ----- Snapshot Rg tensor for diagnostics and analysis region sizing -----
variable Rg_xx equal c_rg_tensor[1]
variable Rg_yy equal c_rg_tensor[2]
variable Rg_zz equal c_rg_tensor[3]

print "Rg_xx = ${Rg_xx}  →  Lx_rg = $(v_gel_lx_rg)"
print "Rg_yy = ${Rg_yy}  →  Ly_rg = $(v_gel_ly_rg)"
print "Rg_zz = ${Rg_zz}  →  Lz_rg = $(v_gel_lz_rg)"
print "BB:  Lx=$(v_gel_lx_bb) Ly=$(v_gel_ly_bb) Lz=$(v_gel_lz_bb)"

# Analysis region half-widths (use rg_scale for ~90% coverage)
variable eps equal 1.0e-12
variable hw_x equal v_region_frac*v_rg_scale*sqrt(v_Rg_xx + v_eps)
variable hw_y equal v_region_frac*v_rg_scale*sqrt(v_Rg_yy + v_eps)
variable hw_z equal v_region_frac*v_rg_scale*sqrt(v_Rg_zz + v_eps)

print "hw_x = ${hw_x}"
print "hw_y = ${hw_y}"
print "hw_z = ${hw_z}"

# ----- Gel strain (Rg-based) -----
# $(v_gel_lz_rg) — parentheses force immediate numeric evaluation right now,
# storing a constant. ${gel_lz_rg} would store the expression string instead.
variable gel_lz_initial equal $(v_gel_lz_rg)
print ">>> Initial gel thickness (Rg): L0 = ${gel_lz_initial}"
print ">>> Initial gel thickness (BB): L0 = $(v_gel_lz_bb)"
print ">>> Gel top (c_maxz) = $(c_maxz)   Piston z = $(c_piston_com[3])   Gap = $(c_piston_com[3]-c_maxz)"

variable gel_strain equal (v_gel_lz_initial - v_gel_lz_rg) / v_gel_lz_initial


# ==========================================================================
#              PHASE 2: PRODUCTION — piston forcing
# ==========================================================================

print "========================================"
print "Phase 2: Production — piston forcing"
print "========================================"

# ----- Enable Piston z-Motion (compression mode only — permeation already has it) -----
if "${compression_mode} == 1" then "unfix freeze_piston"
if "${compression_mode} == 1" then "unfix rigid_piston"
if "${compression_mode} == 1" then &
    "fix rigid_piston piston rigid single force * off off on torque * off off off"

# ----- Thermostat (x,y only — z is flow/compression direction) -----
compute myTemp mobile temp/partial 1 1 0
fix nvt_prod mobile nvt temp ${temp_target} ${temp_target} 1.0
fix_modify nvt_prod temp myTemp

# ----- Piston Force (base + linear ramp) -----
# push_piston_base holds the piston at P_target (same force used in Phase 0.5).
# push_piston adds the additional ramp that drives compression beyond P_target.
# Total force = base + ramp = ramp(f_base+f_start, f_base+f_end).
# For defaults: total ≈ ramp(-0.138, -0.198) → ΔP ≈ 0.26→1.03 above P_target=1.5.
# ramp(lo,hi) evaluates to lo at step 0 of the run and hi at the final step.
# In compression mode the run may halt early so the force won't reach f_end.
variable piston_force_ramp equal ramp(${piston_force_start},${piston_force_end})
fix push_piston      piston addforce 0.0 0.0 v_piston_force_ramp
fix push_piston_base piston addforce 0.0 0.0 ${precomp_f_base}
fix piston_drag      piston viscous 0.01

# ----- Production Trajectory (sparse sampling) -----
dump traj_flow gel_system custom ${dump_freq_prod} &
    traj_files/gel_flow_${dataname}_${interaction}_${nsteps}.lammpstrj &
    id type mol x y z


# ==========================================================================
#                    ANALYSIS: DYNAMIC REGIONS
# ==========================================================================

# Region for X-direction binning: restricted in Y-Z, full extent in X
variable reg_x_ylo equal c_polymer_com[2]-v_hw_y
variable reg_x_yhi equal c_polymer_com[2]+v_hw_y
variable reg_x_zlo equal c_polymer_com[3]-v_hw_z
variable reg_x_zhi equal c_polymer_com[3]+v_hw_z
region reg_x block EDGE EDGE v_reg_x_ylo v_reg_x_yhi v_reg_x_zlo v_reg_x_zhi side in

# Region for Y-direction binning: restricted in X-Z, full extent in Y
variable reg_y_xlo equal c_polymer_com[1]-v_hw_x
variable reg_y_xhi equal c_polymer_com[1]+v_hw_x
variable reg_y_zlo equal c_polymer_com[3]-v_hw_z
variable reg_y_zhi equal c_polymer_com[3]+v_hw_z
region reg_y block v_reg_y_xlo v_reg_y_xhi EDGE EDGE v_reg_y_zlo v_reg_y_zhi side in

# NOTE: Z-direction binning uses the full simulation box (no region restriction).
# This allows piston position to be visualized in permeation mode, and ensures
# support stress appears at its true z-location. X and Y profiles retain the
# polymer-COM-tracked lateral restriction above.


# ==========================================================================
#                    ANALYSIS: CHUNK DEFINITIONS
# ==========================================================================

# 1D binning with dynamic rectangular regions
compute chunk_x_polymer polymer chunk/atom bin/1d x lower ${binWidth} region reg_x
compute chunk_y_polymer polymer chunk/atom bin/1d y lower ${binWidth} region reg_y
compute chunk_z_polymer polymer chunk/atom bin/1d z lower ${binWidth}

compute chunk_x_solvent solvent chunk/atom bin/1d x lower ${binWidth} region reg_x
compute chunk_y_solvent solvent chunk/atom bin/1d y lower ${binWidth} region reg_y
compute chunk_z_solvent solvent chunk/atom bin/1d z lower ${binWidth}

# Z profiles use the full box for all components (no region) — this lets the
# piston location be visualized directly in the z-stress profiles.
compute chunk_z_piston  piston  chunk/atom bin/1d z lower ${binWidth}
compute chunk_z_support support chunk/atom bin/1d z lower ${binWidth}


# ==========================================================================
#                    ANALYSIS: PARTIAL STRESSES
# ==========================================================================

compute stress_polymer polymer stress/atom NULL
compute stress_solvent solvent stress/atom NULL

# Partial stress for each atom: P = -(σxx + σyy + σzz)/(3*vol)
variable press_polymer_x atom -(c_stress_polymer[1]+c_stress_polymer[2]+c_stress_polymer[3])/(3.0*${binWidth}*ly*lz)
variable press_polymer_y atom -(c_stress_polymer[1]+c_stress_polymer[2]+c_stress_polymer[3])/(3.0*lx*${binWidth}*lz)
variable press_polymer_z atom -(c_stress_polymer[1]+c_stress_polymer[2]+c_stress_polymer[3])/(3.0*lx*ly*${binWidth})

variable press_solvent_x atom -(c_stress_solvent[1]+c_stress_solvent[2]+c_stress_solvent[3])/(3.0*${binWidth}*ly*lz)
variable press_solvent_y atom -(c_stress_solvent[1]+c_stress_solvent[2]+c_stress_solvent[3])/(3.0*lx*${binWidth}*lz)
variable press_solvent_z atom -(c_stress_solvent[1]+c_stress_solvent[2]+c_stress_solvent[3])/(3.0*lx*ly*${binWidth})

# Sum pre-divided per-atom contributions over chunks → pressure per bin
compute press_x_polymer polymer reduce/chunk chunk_x_polymer sum v_press_polymer_x
compute press_y_polymer polymer reduce/chunk chunk_y_polymer sum v_press_polymer_y
compute press_z_polymer polymer reduce/chunk chunk_z_polymer sum v_press_polymer_z

compute press_x_solvent solvent reduce/chunk chunk_x_solvent sum v_press_solvent_x
compute press_y_solvent solvent reduce/chunk chunk_y_solvent sum v_press_solvent_y
compute press_z_solvent solvent reduce/chunk chunk_z_solvent sum v_press_solvent_z

# Piston and support partial stresses — same methodology as above.
# stress/atom NULL captures pairwise virial only (no kinetic term), which is
# correct for rigid bodies; internal constraint forces are excluded.
compute stress_piston  piston  stress/atom NULL
compute stress_support support stress/atom NULL

variable press_piston_z  atom -(c_stress_piston[1]+c_stress_piston[2]+c_stress_piston[3])/(3.0*lx*ly*${binWidth})
variable press_support_z atom -(c_stress_support[1]+c_stress_support[2]+c_stress_support[3])/(3.0*lx*ly*${binWidth})

compute press_z_piston  piston  reduce/chunk chunk_z_piston  sum v_press_piston_z
compute press_z_support support reduce/chunk chunk_z_support sum v_press_support_z


# ==========================================================================
#                  ANALYSIS: RESERVOIR PRESSURES (permeation mode only)
# ==========================================================================
# Reservoir pressures are only meaningful in permeation mode:
#   Feed reservoir:     solvent between gel top (c_maxz) and piston bottom face.
#   Permeate reservoir: solvent above piston top face to box top; solvent that
#                       has permeated through gel + support wraps via PBC here.
#
# Piston is 1 sigma thick; its center of mass is c_piston_com[3], so:
#   bottom face = c_piston_com[3] - 0.5*sigma
#   top face    = c_piston_com[3] + 0.5*sigma
# Using the actual faces (rather than the COM) keeps solvent that is between
# the gel top and piston bottom correctly in the feed reservoir, and avoids
# counting any piston volume in either reservoir.
#
# Skipped entirely in compression mode — the support sits at the box bottom,
# leaving only a 1-2 bead sliver of solvent beneath the gel, and the
# variable-bound regions can go negative (causing LAMMPS errors).
#
# P_res = sum[-( σxx+σyy+σzz )_i / 3] / V_res,   V_res = lx·ly·h_res

# Piston face positions (permeation mode only)
if "${compression_mode} == 0" then "variable piston_z_bot equal c_piston_com[3]-0.5*${sigma}"
if "${compression_mode} == 0" then "variable piston_z_top equal c_piston_com[3]+0.5*${sigma}"

# Feed: gel top → piston bottom face
# Desired lower bound is c_maxz (true polymer top surface), but if the piston
# has settled very close to the gel (gap < sigma), c_maxz >= piston_z_bot and
# LAMMPS throws a "bad value" error at region creation.  Guard against this by
# clamping res_feed_zlo to at most (piston_z_bot - sigma), giving a region that
# is always at least 1 sigma tall.  The conditional below evaluates to c_maxz
# when there is enough clearance, and falls back to the clamped value otherwise.
if "${compression_mode} == 0" then &
    "variable res_feed_zlo equal (c_maxz<(c_piston_com[3]-1.5*${sigma}))*c_maxz+(c_maxz>=(c_piston_com[3]-1.5*${sigma}))*(c_piston_com[3]-1.5*${sigma})"
if "${compression_mode} == 0" then "region reg_feed_res block EDGE EDGE EDGE EDGE v_res_feed_zlo v_piston_z_bot side in"

# Permeate: piston top face → box top (permeated solvent collects here via PBC)
if "${compression_mode} == 0" then "region reg_perm_res block EDGE EDGE EDGE EDGE v_piston_z_top EDGE side in"

# Dynamic solvent groups — membership refreshed every stress sampling interval
if "${compression_mode} == 0" then "group g_solvent_feed dynamic solvent region reg_feed_res every ${nevery_stress}"
if "${compression_mode} == 0" then "group g_solvent_perm dynamic solvent region reg_perm_res every ${nevery_stress}"

# Per-atom pressure·volume; reuses c_stress_solvent
if "${compression_mode} == 0" then "variable pv_solvent atom -(c_stress_solvent[1]+c_stress_solvent[2]+c_stress_solvent[3])/3.0"

if "${compression_mode} == 0" then "compute pv_feed g_solvent_feed reduce sum v_pv_solvent"
if "${compression_mode} == 0" then "compute pv_perm g_solvent_perm reduce sum v_pv_solvent"

# Reservoir volumes (height = distance between region faces, not piston COM)
if "${compression_mode} == 0" then "variable vol_feed equal lx*ly*(v_piston_z_bot-v_res_feed_zlo)"
if "${compression_mode} == 0" then "variable vol_perm equal lx*ly*(lz-v_piston_z_top)"

# Instantaneous reservoir pressures
if "${compression_mode} == 0" then "variable P_res_feed equal c_pv_feed/v_vol_feed"
if "${compression_mode} == 0" then "variable P_res_perm equal c_pv_perm/v_vol_perm"


# ==========================================================================
#                         OUTPUT: PISTON DATA
# ==========================================================================

fix out_piston_pos all print ${volume_freq} "$(step) $(c_piston_com[3])" &
    file output_files/piston_data/piston_position_${dataname}_${interaction}_${nsteps}.dat screen no

fix out_piston_vel all print ${volume_freq} "$(step) $(c_piston_vz)" &
    file output_files/piston_data/piston_velocity_${dataname}_${interaction}_${nsteps}.dat screen no


# ==========================================================================
#                    OUTPUT: PARTIAL STRESS PROFILES (time-averaged)
# ==========================================================================

fix avg_stress_x_poly all ave/time ${nevery_stress} ${nrepeat_stress} ${nfreq_stress} &
    c_press_x_polymer mode vector file output_files/stress_data/stress_x_polymer_${dataname}_${interaction}_${nsteps}.dat

fix avg_stress_y_poly all ave/time ${nevery_stress} ${nrepeat_stress} ${nfreq_stress} &
    c_press_y_polymer mode vector file output_files/stress_data/stress_y_polymer_${dataname}_${interaction}_${nsteps}.dat

fix avg_stress_z_poly all ave/time ${nevery_stress} ${nrepeat_stress} ${nfreq_stress} &
    c_press_z_polymer mode vector file output_files/stress_data/stress_z_polymer_${dataname}_${interaction}_${nsteps}.dat

fix avg_stress_x_solv all ave/time ${nevery_stress} ${nrepeat_stress} ${nfreq_stress} &
    c_press_x_solvent mode vector file output_files/stress_data/stress_x_solvent_${dataname}_${interaction}_${nsteps}.dat

fix avg_stress_y_solv all ave/time ${nevery_stress} ${nrepeat_stress} ${nfreq_stress} &
    c_press_y_solvent mode vector file output_files/stress_data/stress_y_solvent_${dataname}_${interaction}_${nsteps}.dat

fix avg_stress_z_solv all ave/time ${nevery_stress} ${nrepeat_stress} ${nfreq_stress} &
    c_press_z_solvent mode vector file output_files/stress_data/stress_z_solvent_${dataname}_${interaction}_${nsteps}.dat

fix avg_stress_z_pist all ave/time ${nevery_stress} ${nrepeat_stress} ${nfreq_stress} &
    c_press_z_piston mode vector file output_files/stress_data/stress_z_piston_${dataname}_${interaction}_${nsteps}.dat

fix avg_stress_z_supp all ave/time ${nevery_stress} ${nrepeat_stress} ${nfreq_stress} &
    c_press_z_support mode vector file output_files/stress_data/stress_z_support_${dataname}_${interaction}_${nsteps}.dat


# ==========================================================================
#                  OUTPUT: RESERVOIR PRESSURES (permeation mode only)
# ==========================================================================
if "${compression_mode} == 0" then &
    "fix avg_P_feed all ave/time ${nevery_stress} ${nrepeat_stress} ${nfreq_stress} v_P_res_feed file output_files/stress_data/pressure_feed_${dataname}_${interaction}_${nsteps}.dat"

if "${compression_mode} == 0" then &
    "fix avg_P_perm all ave/time ${nevery_stress} ${nrepeat_stress} ${nfreq_stress} v_P_res_perm file output_files/stress_data/pressure_permeate_${dataname}_${interaction}_${nsteps}.dat"


# ==========================================================================
#                    OUTPUT: GEL STRAIN (for longitudinal modulus)
# ==========================================================================
# Columns: timestep | L_initial_rg (constant) | L_current_rg (dynamic)
# ΔL = L_initial - L_current;  ε = ΔL / L_initial
# Gel thickness from Rg: L = 2√3·√(Rg_zz²)  (uniform rectangular prism)
# This file is read by longitudinal_modulus_analysis.ipynb.

fix out_strain_zz all print ${volume_freq} &
    "$(step) ${gel_lz_initial} $(v_gel_lz_rg)" &
    file output_files/stress_data/strain_zz_${dataname}_${interaction}_${nsteps}.dat screen no

# Echo current strain to thermo log as well
variable gel_strain_pct equal v_gel_strain*100.0
fix out_gel_strain_thermo all print ${thermo_freq} &
    ">>> gel_strain = $(v_gel_strain_pct) %" screen yes &
    file output_files/stress_data/gel_strain_log_${dataname}_${interaction}_${nsteps}.dat


# ==========================================================================
#                    OUTPUT: GEL DIMENSIONS
# ==========================================================================

# Bounding-box volume and dimensions (for comparison/diagnostics)
fix out_gel_vol_bb all print ${volume_freq} "$(step) $(v_gel_vol_bb)" &
    file output_files/volume_data/gel_volume_bb_${dataname}_${interaction}_${nsteps}.dat screen no

fix out_gel_dims_bb all print ${volume_freq} "$(step) $(v_gel_lx_bb) $(v_gel_ly_bb) $(v_gel_lz_bb)" &
    file output_files/volume_data/gel_dimensions_bb_${dataname}_${interaction}_${nsteps}.dat screen no

# Rg-based volume and dimensions (rectangular prism: L_i = 2√3·√Rg_ii²)
fix out_gel_vol_rg all print ${volume_freq} "$(step) $(v_gel_vol_rg)" &
    file output_files/volume_data/gel_volume_rg_${dataname}_${interaction}_${nsteps}.dat screen no

fix out_gel_dims_rg all print ${volume_freq} "$(step) $(v_gel_lx_rg) $(v_gel_ly_rg) $(v_gel_lz_rg)" &
    file output_files/volume_data/gel_dimensions_rg_${dataname}_${interaction}_${nsteps}.dat screen no

# Box dimensions
fix out_box_dims all print ${volume_freq} "$(step) $(v_box_lx) $(v_box_ly) $(v_box_lz)" &
    file output_files/volume_data/box_dimensions_${dataname}_${interaction}_${nsteps}.dat screen no

fix out_polymer_com all print ${volume_freq} &
    "$(step) $(c_polymer_com[1]) $(c_polymer_com[2]) $(c_polymer_com[3])" &
    file output_files/volume_data/polymer_com_${dataname}_${interaction}_${nsteps}.dat screen no


# ==========================================================================
#         COMPRESSION MODE: HALT AT comp_percent STRAIN
# ==========================================================================
# fix halt stops the current run command (error continue = no abort).
# After the run exits the script continues to the relaxation block below.
# In permeation mode this fix is not created, so the run simply goes to nsteps.

if "${compression_mode} == 1" then &
    "fix halt_compress all halt ${volume_freq} v_gel_strain >= ${comp_percent} error continue"

print ">>> Starting Phase 2 production run (nsteps = ${nsteps})"
print ">>> compression_mode = ${compression_mode}"

variable phase2_start equal $(step)

# ==========================================================================
#                         PRODUCTION RUN
# ==========================================================================
# Compression mode: this run halts early when gel_strain >= comp_percent.
# Permeation mode:  this run runs to completion (nsteps).

run ${nsteps}


# ==========================================================================
#              COMPRESSION MODE — FREEZE PISTON + STRESS RELAXATION
# ==========================================================================
# These commands only execute when compression_mode == 1.
# After the halt the gel is at ~comp_percent strain.  We freeze the piston
# in place and run for the remaining steps so that compression + relaxation
# = exactly nsteps total.  If comp_percent was never reached, relax_steps
# will be 0 and the run below is a no-op (and a warning is printed).
# NOTE: ave/time accumulators continue from where they left off — the output
# files will contain entries spanning both the compression and relaxation phases.

if "${compression_mode} == 1" then "unfix halt_compress"
variable phase2_end   equal $(step)
variable relax_steps  equal ${nsteps}-(${phase2_end}-${phase2_start})
if "${compression_mode} == 1 && ${relax_steps} <= 0" then &
    "print 'WARNING: COMPRESSION TARGET NOT REACHED WITHIN nsteps — NO RELAXATION STEPS REMAINING'"
if "${compression_mode} == 1" then "print '>>> Compression halted — relaxation steps remaining: ${relax_steps}'"
if "${compression_mode} == 1" then "print '>>> Freezing piston and starting stress relaxation'"

# Snapshot hw values as constants before destroying rg_tensor
# (reg_x and reg_y use these as dynamic bounds; gel is frozen so values won't change)
if "${compression_mode} == 1" then "variable hw_x equal $(v_hw_x)"
if "${compression_mode} == 1" then "variable hw_y equal $(v_hw_y)"
if "${compression_mode} == 1" then "variable hw_z equal $(v_hw_z)"

# Stop all volume/strain/dim output — everything is constant after piston freeze
if "${compression_mode} == 1" then "unfix out_piston_pos"
if "${compression_mode} == 1" then "unfix out_piston_vel"
if "${compression_mode} == 1" then "unfix out_strain_zz"
if "${compression_mode} == 1" then "unfix out_gel_strain_thermo"
if "${compression_mode} == 1" then "unfix out_gel_vol_bb"
if "${compression_mode} == 1" then "unfix out_gel_dims_bb"
if "${compression_mode} == 1" then "unfix out_gel_vol_rg"
if "${compression_mode} == 1" then "unfix out_gel_dims_rg"
if "${compression_mode} == 1" then "unfix out_box_dims"
if "${compression_mode} == 1" then "unfix out_polymer_com"

# Free the expensive computes (polymer_com must stay for dynamic region bounds)
if "${compression_mode} == 1" then "uncompute rg_tensor"
if "${compression_mode} == 1" then "uncompute minx"
if "${compression_mode} == 1" then "uncompute maxx"
if "${compression_mode} == 1" then "uncompute miny"
if "${compression_mode} == 1" then "uncompute maxy"
if "${compression_mode} == 1" then "uncompute minz"
if "${compression_mode} == 1" then "uncompute maxz"

# Disable piston force and motion
if "${compression_mode} == 1" then "unfix push_piston"
if "${compression_mode} == 1" then "unfix push_piston_base"
if "${compression_mode} == 1" then "unfix piston_drag"
if "${compression_mode} == 1" then "unfix rigid_piston"
if "${compression_mode} == 1" then "velocity piston set 0.0 0.0 0.0"
if "${compression_mode} == 1" then &
    "fix rigid_piston piston rigid single force * off off off torque * off off off"

if "${compression_mode} == 1" then "run ${relax_steps}"


# ==========================================================================
#                            CLEANUP
# ==========================================================================

# Unfix piston motion fixes — only still active in permeation mode
# (push_piston_base is compression-mode only; already unfixed above if comp_mode=1)
if "${compression_mode} == 0" then "unfix push_piston"
if "${compression_mode} == 0" then "unfix piston_drag"

undump traj_flow

print "========================================"
print "Simulation complete"
print "========================================"

variable outfile string "final_flow_${dataname}_${interaction}_${nsteps}"
write_data ${outfile}.data
